ORIGIN := 1  # задание 1 и 2
Γ := 3
Ν := 8
# задание 3
a := Γ*Ν = 24
b := Γ + Ν = 11
a11 := (a + b)/2
V := [Γ + Ν + 1; Γ + Ν + 2]
M := [Γ + Ν + 1, Γ + Ν + 2; Γ + Ν + 3, Γ + Ν + 4]
M1 := [(a + b)/2, (a - b)/2; 2/(a + b), 2/(a - b)]
M1 = [17.5, 6.5; 0.0571429, 0.153846]
cols(V) = 1
cols(M) = 2
|V| = 17.6918
V = [12; 13]
rows(V) = 2
rows(M) = 2
length(V) = 2
|M1| = 2.32088
M1 → [35/2, 13/2; 2/35, 2/13]
|M| = -2
M = [12, 13; 14, 15]
last(V) = 2
|M1| → 1056/455 = 2.32088
# команда Origin меняет показатель отсчета изначально он 0, теперь он изменен на 1
M1[1, 1] = 17.5
M1[1, 1] → 35/2
M1[1, 2] = 6.5
M1[1, 2] → 13/2
# задание 4
M1[2, 1] = 0.0571429
M1[2, 1] → 2/35
M2[1, 1] := Γ + Ν + 1
M2[2, 1] := Γ + Ν + 3
M1[2, 2] = 0.153846
M1[2, 2] → 2/13
M2[2, 2] := Γ + Ν + 4
M2[1, 2] := Γ + Ν + 2
M2 := [M2[1, 1], M2[1, 2]; M2[2, 1], M2[2, 2]] = [12, 13; 14, 15]
M2 = [12, 13; 14, 15]
# задание 5
V1 := M[:, 2] = [13; 15]
transpose(V1) = [13, 15]
V2 := transpose(M)[:, 2] = [14; 15]
# задание 6
i1 := 1 .. 8
j1 := i1
i3 := 1 .. 4
S[i1, j1] := Γ*i1 + Ν*j1
S = [
    11, 19, 27, 35, 43, 51, 59, 67;
    14, 22, 30, 38, 46, 54, 62, 70;
    17, 25, 33, 41, 49, 57, 65, 73;
    20, 28, 36, 44, 52, 60, 68, 76;
    23, 31, 39, 47, 55, 63, 71, 79;
    26, 34, 42, 50, 58, 66, 74, 82;
    29, 37, 45, 53, 61, 69, 77, 85;
    32, 40, 48, 56, 64, 72, 80, 88
]
X[i3] := 2*Γ*i3 + 2*Ν
Y[i3] := X[i3]^2
X = [22; 28; 34; 40]
Y = [484; 784; 1156; 1600]
A[i3, 1] := X[i3]
A[i3, 2] := Y[i3]
A = [22, 484; 28, 784; 34, 1156; 40, 1600]
WRITEPRN("var8") := A
WRITEPRN("var8") := S
R[i1, j1] := S[i1, j1]^2
R = [
    121, 361, 729, 1225, 1849, 2601, 3481, 4489;
    196, 484, 900, 1444, 2116, 2916, 3844, 4900;
    289, 625, 1089, 1681, 2401, 3249, 4225, 5329;
    400, 784, 1296, 1936, 2704, 3600, 4624, 5776;
    529, 961, 1521, 2209, 3025, 3969, 5041, 6241;
    676, 1156, 1764, 2500, 3364, 4356, 5476, 6724;
    841, 1369, 2025, 2809, 3721, 4761, 5929, 7225;
    1024, 1600, 2304, 3136, 4096, 5184, 6400, 7744
]
WRITEPRN("var") := R
# Задание 7
A2 := READPRN("ВАРИАНТ_08.prn")
A2 = [
    19.4, 29.34, 39.29, 49.24, 59.19, 69.14, 79.08, 89.03, 98.98;
    28.85, 38.79, 48.74, 58.69, 68.64, 78.59, 88.53, 98.48, 108.43;
    38.29, 48.24, 58.19, 68.14, 78.09, 88.03, 97.98, 107.93, 117.88;
    47.74, 57.69, 67.64, 77.59, 87.54, 97.48, 107.43, 117.38, 127.33;
    57.19, 67.14, 77.09, 87.04, 96.98, 106.93, 116.88, 126.83, 136.78;
    66.64, 76.59, 86.54, 96.48, 106.43, 116.38, 126.33, 136.28, 146.22
]
# Задание 8
a
L := [Ν + Γ + 1, Ν + Γ + 2, Ν + Γ + 3; Ν + Γ + 4, Ν + Γ + 5, Ν + Γ + 6; Ν + Γ + 7, Ν + Γ + 8, Ν + Γ + 9] = [12, 13, 14; 15, 16, 17; 18, 19, 20]
K := [0, -1, -2; 1, 0, -1; 2, 1, 0]
L + K = [12, 12, 12; 16, 16, 16; 20, 20, 20]
i := 1 .. 3
j := 1 .. 3
M3[i, j] := L[i, j] + K[i, j]
M3 = [12, 12, 12; 16, 16, 16; 20, 20, 20]
б
L - K = [12, 14, 16; 14, 16, 18; 16, 18, 20]
M4[i, j] := L[i, j] - K[i, j]
M4 = [12, 14, 16; 14, 16, 18; 16, 18, 20]
в
N := 8
N + L = [20, 21, 22; 23, 24, 25; 26, 27, 28]
M5[i, j] := N + L[i, j]
M5 = [20, 21, 22; 23, 24, 25; 26, 27, 28]
г
A3 := [N + Γ + 1, N + Γ + 3, N + Γ + 5, N + Γ + 7; N + Γ + 2, N + Γ + 4, N + Γ + 6, N + Γ + 8]
B3 := [N + Γ + 1, N + Γ + 5; N + Γ + 2, N + Γ + 6; N + Γ + 3, N + Γ + 7; N + Γ + 4, N + Γ + 8]
C3 := A3*B3
C3 = [820, 1060; 874, 1130]
sum(A3*B3, j = 1 .. 1) = [820, 1060; 874, 1130]
д
T := -N*L = [-96, -104, -112; -120, -128, -136; -144, -152, -160]
-L → [-12, -13, -14; -15, -16, -17; -18, -19, -20]
L*(-1) → [-12, -13, -14; -15, -16, -17; -18, -19, -20]
-N*L = [-96, -104, -112; -120, -128, -136; -144, -152, -160]
е
|C3| = 160
|V| → sqrt(313)
|V| → sqrt(313)
|C3| = 160
|C3| → 160
|V| = 17.6918
|C3| → 160
|V| =  # error: Эта матрица должна быть квадратной.
# V это вектор, а вектор не может быть квадратным
ж
X := [Ν + Γ + 1; Ν + Γ + 2; Ν + Γ + 3] = [12; 13; 14]
Y := [Ν + Γ + 5; Ν + Γ + 6; Ν + Γ + 7] = [16; 17; 18]
X*Y = 665
sum(X[j]*Y[j], j = 1 .. 3) = 665
з
Z := X×Y = [-4; 8; -4]
Z := [
    X[2, 1]*Y[3, 1] - Y[2, 1]*X[3, 1];
    -(X[1, 1]*Y[3, 1] - X[3, 1]*Y[1, 1]);
    X[1, 1]*Y[2, 1] - X[2, 1]*Y[1, 1]
] = [-4; 8; -4]
transpose(X) = [12, 13, 14]
|X| = 22.561
|Y| = 29.4788
X = [12; 13; 14]
ϕ := acos(X*Y/(|X|*|Y|)) = 0.0147327
Z = [-4; 8; -4]
|Z| = 9.79796
Z1 := |X|*|Y|*sin(ϕ)
Z1 = 9.79796
Z2[1] := (-1)^(1 - 1)*[X[2, 1], X[3, 1]; Y[2, 1], Y[3, 1]] = [13, 14; 17, 18]
Z2[2] := (-1)^(2 - 1)*[X[1, 1], X[3, 1]; Y[2, 1], Y[3, 1]] = [-12, -14; -17, -18]
Z2[3] := (-1)^(3 - 1)*[X[1, 1], X[2, 1]; Y[1, 1], Y[2, 1]] = [12, 13; 16, 17]
и
sum(X) + sum(Y) = 90
X[1] + X[2] + X[3] + Y[1] + Y[2] + Y[3] = 90
к
tr(L) = 48
sum(L[j, j], j = 1 .. 2) = 28
л
M6 := [0, Ν*π/3; -Ν*π/2, Ν*π] = [0, 8.37758; -12.5664, 25.1327]
vectorize(sin(M6)) = [0, 0.866025; 0, 0]
м
A4 := [Γ + Ν + 1, Γ + Ν + 4, Γ + Ν + 2; Γ + Ν + 3, Γ + Ν + 0, Γ + Ν + 1; Γ + Ν + 7, Γ + Ν + 8, Γ + Ν + 9] = [12, 15, 13; 14, 11, 12; 18, 19, 20]
A4^-1 = [0.0465116, 0.30814, -0.215116; 0.372093, -0.0348837, -0.22093; -0.395349, -0.244186, 0.453488]
A4^-1 → [2/43, 53/172, -37/172; 16/43, -3/86, -19/86; -17/43, -21/86, 39/86]
B[1, 2] := (-1)^(1 + 2)*det([23, 21; 27, 28])/|A4| = 0.447674
B[1, 1] := (-1)^(1 + 1)*det([19, 20; 27, 28])/|A4| = 0.0465116
|A4| → -172
B[2, 2] := (-1)^(2 + 2)*det([20, 21; 26, 28])/|A4| = -0.0813953
B[2, 1] := (-1)^(2 + 1)*det([22, 20; 26, 28])/|A4| = 0.55814
B[3, 2] := (-1)^(3 + 2)*det([20, 23; 26, 27])/|A4| = -0.337209
B[3, 1] := (-1)^(3 + 1)*det([22, 19; 26, 27])/|A4| = -0.581395
B[1, 3] := (-1)^(1 + 3)*det([23, 21; 19, 20])/|A4| = -0.354651
B[2, 3] := (-1)^(2 + 3)*det([20, 21; 22, 20])/|A4| = -0.360465
B[3, 3] := (-1)^(3 + 3)*det([20, 23; 22, 19])/|A4| = 0.732558
н
B = [0.0465116, 0.447674, -0.354651; 0.55814, -0.0813953, -0.360465; -0.581395, -0.337209, 0.732558]
B5 := mod(N, 7) = 1
B5 := identity(mod(N, 5) + 2) = [1, 0, 0, 0, 0; 0, 1, 0, 0, 0; 0, 0, 1, 0, 0; 0, 0, 0, 1, 0; 0, 0, 0, 0, 1]
A4*A4^-1 = [1, 0, 0; 0, 1, 0; 0, 0, 1]
о
A4^0 = [1, 0, 0; 0, 1, 0; 0, 0, 1]
V5 := [Γ + N + 1; Γ + N + 2; Γ + N + 3] = [12; 13; 14]
C5 := diag(V5) = [12, 0, 0; 0, 13, 0; 0, 0, 14]
п
Z4 := submatrix(A4, 2, 3, 2, 3) = [11, 12; 19, 20]
Z5 := submatrix(A4, 3, 3, 2, 3) = [19, 20]
Z6 := submatrix(A4, 1, 3, 2, 2) = [15; 11; 19]
р
F := augment(V5, Z, Z6) = [12, -4, 15; 13, 8, 11; 14, -4, 19]
A4 = [12, 15, 13; 14, 11, 12; 18, 19, 20]
с
L = [12, 13, 14; 15, 16, 17; 18, 19, 20]
G := stack(A4, L) = [12, 15, 13; 14, 11, 12; 18, 19, 20; 12, 13, 14; 15, 16, 17; 18, 19, 20]
т
csort(F, 2) = [12, -4, 15; 14, -4, 19; 13, 8, 11]
у
rsort(F, 3) = [-4, 12, 15; 8, 13, 11; -4, 14, 19]
ф
V6 := [Ν + 6*mod(3, Ν) + 1; Ν + 2*mod(4, Ν) + 1; Ν + 8*mod(5, Ν) + 1]
# так как mod выдовал ошибку, что нужны 2 параметра вписала N
sort(V6) = [17; 27; 49]
х
reverse(V6) = [49; 17; 27]
# задание 9
B := [-4; 8; -10; -6; 7; -3; -6]
A := [
    3, 6, 1, -1, 4, 1, 2;
    2, 4, -1, 1, 0, 0, 0;
    1, 2, 2, -1, 5, 2, 0;
    -1, -2, 1, -1, -3, 2, 0;
    1, 1, 1, 3, 3, 0, 0;
    2, 4, 1, -1, 3, 1, 1;
    1, 2, 2, -2, 3, 2, 2
]
A^-1*B = [153; -79; -34; -16; 5; 11; -1]
lsolve(A, B) = [153; -79; -34; -16; 5; 11; -1]
