Y(x) := sin(x^3) + x^3
y1(x) := 2*e^x
N(x) := tan(2*x)^4
y2(x) := 2*e^(-x)
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y(x) := log((x + 1)/(x - 1), 2)
b(x) := 7
y3(x) := 0.5*e^x
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f(x) := limit(y(x)/y, x → ∞)*x + limit(y(x) - x, x → ∞) → -∞
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